import Sofa
import math
import os

outer_skin_indices = [7162L, 7163L, 7164L, 7165L, 7166L, 7167L, 7168L, 7169L, 7170L, 7171L, 7172L, 7173L, 7174L, 7175L, 7176L, 7177L, 7178L, 7179L, 7180L, 7181L, 7182L, 7183L, 7184L, 7185L, 7186L, 7187L, 7188L, 7189L, 7190L, 7191L, 7192L, 7193L, 7194L, 7195L, 7196L, 7197L, 7198L, 7199L, 7200L, 7201L, 7202L, 7203L, 7204L, 7205L, 7206L, 7207L, 7208L, 7209L, 7210L, 7211L, 7212L, 7213L, 7214L, 7215L, 7216L, 7217L, 7218L, 7219L, 7220L, 7221L, 7222L, 7223L, 7224L, 7225L, 7226L, 7227L, 7228L, 7229L, 7230L, 7231L, 7232L, 7233L, 7234L, 7235L, 7236L, 7237L, 7238L, 7239L, 7240L, 7241L, 7242L, 7243L, 7244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

youngModulusFingers = 500
youngModulusStiffLayerFingers = 1500
gap = 5 # distance from dof of pointer to contact surface
coff_contact_stiffess = 0
biggest_skin_diameter = 106.7225
contact_distance = 10  # type: int
init_pointer_pos = (biggest_skin_diameter/2)+ gap + contact_distance - coff_contact_stiffess

radius = 70
angle1 = 120*math.pi/180  # Angle between 1st and 2nd finger in radian
angle2 = 240*math.pi/180  # Angle between 1st and 3rd finger in radian
translateFinger1 = '70 0 0'
translateFinger2 = '0 70 0'
translateFinger3 = '30 30 0'
translations= [translateFinger1,translateFinger2, translateFinger3]
angles=[0,angle1, angle2]
def createScene(rootNode):
    rootNode.findData('gravity').value='0 0 -9810'
    rootNode.findData('dt').value='0.01'

    rootNode.createObject("RequiredPlugin", name="SofaSparseSolver")
    rootNode.createObject("RequiredPlugin", name="SofaPython")
    rootNode.createObject("RequiredPlugin", name="SofaOpenglVisual")
    rootNode.createObject("RequiredPlugin", name="SofaMiscCollision")
    rootNode.createObject("RequiredPlugin", name="SofaBoundaryCondition")
    rootNode.createObject("RequiredPlugin", name="SofaImplicitOdeSolver")
    rootNode.createObject("RequiredPlugin", name="SofaGeneralDeformable")
    rootNode.createObject("RequiredPlugin", name="SofaLoader")
    rootNode.createObject("RequiredPlugin", name="SofaMiscFem")
    rootNode.createObject("RequiredPlugin", name="SofaMeshCollision")
    rootNode.createObject("RequiredPlugin", name="SofaEngine")
    rootNode.createObject("RequiredPlugin", name="SofaConstraint")
    rootNode.createObject("VisualStyle", displayFlags='showVisualModels hideBehaviorModels hideCollisionModels hideBoundingCollisionModels hideForceFields showInteractionForceFields hideWireframe')
    rootNode.createObject('PythonScriptController', filename="SimTacLS-controller.py", classname="controller")


    rootNode.createObject("DefaultPipeline", name="CollisionPipeline", verbose="0")
    rootNode.createObject("BruteForceDetection", name="N2")
    rootNode.createObject("DefaultContactManager",name="collision response", response='FrictionContact', responseParams='mu=0.6')
    rootNode.createObject('LocalMinDistance', name='Proximity', alarmDistance=13, contactDistance=contact_distance, angleCone=0.01)
    rootNode.createObject('FreeMotionAnimationLoop')
    rootNode.createObject('GenericConstraintSolver', name='constraint solver', tolerance=1e-12, maxIterations=80000, computeConstraintForces = 1)
    rootNode.createObject('DiscreteIntersection')
    rootNode.createObject('BackgroundSetting', color=[0, 0.168627, 0.211765])
    rootNode.createObject('OglSceneFrame', style='Arrows', alignment='TopRight')

    ##Finger node
    for i in range(2):
        finger = rootNode.createChild('finger'+str(i+1))
        finger.createObject('EulerImplicitSolver', name='odesolver', rayleighStiffness='0.1', rayleighMass='0.1')
        finger.createObject('SparseLDLSolver', name='preconditioner')
        finger.createObject('TransformEngine', name="transform",
                            template="Rigid3",
                            translation="0 0 0",
                            rotation="0 0 0",
                            scale="1 1 1",
                            input_position="0 0 0  0 0 0 1")
        finger.createObject('MechanicalObject', name='tetras',template='Rigid3d',translation = translations[i], rotation=[0, 90,angles[i]*180/math.pi], showObject = 1,showObjectScale=5)
        finger.createObject('UniformMass', totalMass=0.0001)
        finger.createObject('BoxROI', name='boxROI', box=[10, -20, 45, 195, 20.5, 65], drawBoxes = 0, drawSize = 0.1, doUpdate='0')
        if i == 0:
            finger.createObject('RestShapeSpringsForceField', points='@boxROI.indices', stiffness=1e12,
                                angularStiffness=1e12, drawSpring='true')
        else:
            finger.createObject('RestShapeSpringsForceField', points='@../finger1/boxROI.indices', stiffness=1e12,
                                angularStiffness=1e12, drawSpring='true')
        finger.createObject('LinearSolverConstraintCorrection', solverName='preconditioner')

        ##########################################
        # Collision							     #
        ##########################################

        collisionFinger = finger.createChild('collisionFinger')
        collisionFinger.createObject('MechanicalObject', name='collisMech')
        collisionFinger.createObject('SphereCollisionModel', radius="5")
        collisionFinger.createObject('RigidMapping')

        ##########################################
        # Visualization						  #
        ##########################################
        modelVisu = finger.createChild('visu')
        modelVisu.createObject('MeshSTLLoader', name='loader', filename='mesh/pointer-stl-fine.stl',scale=1)
        modelVisu.createObject('OglModel', src='@loader',template='Vec3d', color=[0.7, 0.7, 0.7, 0.6])
        modelVisu.createObject('RigidMapping')


    ## Skin node
    skin = rootNode.createChild('skin')
    skin.findData('gravity').value = '0 0 -9810'

    skin.createObject("EulerImplicitSolver", name="cg_odesolver")
    skin.createObject('SparseLDLSolver', name='linearSolver')
    skin.createObject("MeshVTKLoader", filename="mesh/skin-vtk.vtk", name="loader", translation='0 0 -10',
                      rotation='180 0 0', createSubelements=0, onlyAttachedPoints=0)
    skin.createObject("MechanicalObject", template="Vec3d", src="@loader", name="DOFs", showIndices = 0,showIndicesScale =0.001, showColor = 'red', showVectors = 0, showVectorsScale = 0.6, drawMode = 2  )
    skin.createObject("TetrahedronSetTopologyContainer", src="@loader", name="topology", checkTopology=1)
    skin.createObject("TetrahedronSetTopologyModifier", name="Modifier")
    skin.createObject("TetrahedronSetGeometryAlgorithms", name="GeomAlgo", template="Vec3d")
    skin.createObject("UniformMass", totalMass='0.00028', name="mass" )
    skin.createObject('TetrahedronFEMForceField', template='Vec3', name='FEM', method='large', poissonRatio=0.45,  youngModulus=0.1262, drawAsEdges=True)
    skin.createObject("BoxROI", template="Vec3d", box="-50 -50 -5 50 50 1 -50 -50 259.5 50 50 260.5", drawBoxes="0",  name="FixedROI",
                      computeEdges="1", computeTriangles="0", computeTetrahedra="0", computeHexahedra="0", drawSize="0.5")
    skin.createObject("BoxROI",  template="Vec3d", box="-70 -70 19.5 70 70 240.5", drawBoxes="0", position="@DOFs.rest_position",
                      name='measuring region', computeEdges="1", computeTriangles="0", computeTetrahedra="0", computeHexahedra="0",
                      drawSize="0.5")
    skin.createObject("FixedConstraint", indices="@FixedROI.indices")
    skin.createObject('LinearSolverConstraintCorrection', solverName='linearSolver')


    ## Collision node
    skinCollision = skin.createChild('SkinCollision')
    skinCollision.createObject("MeshSTLLoader", filename="mesh/skin-stl.stl", name="loader",
                               translation='0 0 0',
                               rotation='180 0 0')
    skinCollision.createObject('MeshTopology', src='@loader', name='topology')
    skinCollision.createObject('MechanicalObject', name='collisMech')
    skinCollision.createObject('TriangleCollisionModel', selfCollision=0)
    skinCollision.createObject('LineCollisionModel', selfCollision=0)
    skinCollision.createObject('PointCollisionModel', selfCollision=0)
    skinCollision.createObject('BarycentricMapping')


    ## Visual node
    visual = skin.createChild('Visual')
    visual.createObject("OglModel", name="Visual", color="yellow")
    visual.createObject("STLExporter", name='skin_exporter', filename="/home/respitory adress ... ",
                        position="@Visual.position",
                        triangles="@Visual.triangles", exportEveryNumberOfSteps="20", enable=False)
    visual.createObject("IdentityMapping", template="Vec3d,Vec3d", name="visualMapping", input="@../DOFs", output="@Visual")

    # markers node
    marker = rootNode.createChild('markers')

    marker.createObject("EulerImplicitSolver", name="cg_odesolver")
    marker.createObject('CGLinearSolver', name='linearSolver', threshold=1e-12)
    marker.createObject("MeshVTKLoader", filename="mesh/marker-vtk.vtk", name="loader", translation = '0 0 -10', rotation = '180 0 0', createSubelements="1" )
    marker.createObject("MechanicalObject", template="Vec3d", src="@loader", name="DOFs-marker",showIndices = 0,showIndicesScale =0.0008)
    marker.createObject("TetrahedronSetTopologyContainer", src="@loader", name="topology")
    marker.createObject('TetrahedronFEMForceField', template='Vec3', name='FEM', method='large', poissonRatio=0.49,
                      youngModulus=5000000)
    marker.createObject("UniformMass", totalMass='0.00000000000000353', name="mass")

    ## Visual node
    marker_visual = marker.createChild('Visual')
    marker_visual.createObject('MeshSTLLoader', name='loader', filename='mesh/marker-stl.stl',translation = '0 0 -10', rotation = '180 0 0')
    marker_visual.createObject("OglModel", name="Visual-marker", color="red", src='@loader')
    marker_visual.createObject("STLExporter", name = 'marker_exporter', filename = "/home/respitory adress ... ", position = "@Visual.position",
                        triangles = "@Visual.triangles", exportEveryNumberOfSteps = "20", enable = False)
    marker_visual.createObject("BarycentricMapping")
    marker.createObject('UncoupledConstraintCorrection')
    # ## Attach node
    attach = rootNode.createChild('attach')
    attach.createObject("AttachConstraint", object1="@skin", object2="@markers", twoWay="false",
                        indices1="6905 2090 2091 2092 2093 1026 1027 6906 2088 2089 2094 2095 1024 1025 6907 2086 2087 2096 2097 1022 1023 6908 2084 2085 2098 2099 1020 1021 6909 2082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",
                        indices2="3079 1026 1027 1030 1031 3 2 3087 1034 1035 1038 1039 7 6 3095 1042 1043 1046 1047 11 10 3103 1050 1051 1054 1055 15 14 3111 1058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",
                        constraintFactor="1 1 1 1 1 1 1 1 1 1 1 1 1 1 1 1 1 1 1 1 1 1 1 1 1 1 1 1 1 1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")
    return rootNode
